*Heading
** Job name: pelvic-floor Model name: Model-1
** Generated by: Abaqus/CAE 6.14-1
*Preprint, echo=NO, model=NO, history=NO, contact=NO
**
** PARTS
**
*Part, name=Part-1
*End Part
**
**
** ASSEMBLY
**
*Assembly, name=Assembly
**
*Instance, name=Part-1-1, part=Part-1
*Node
      1, -0.00597730046, 0.0571884774,           0.
      2, -0.011889834, 0.0562572815,           0.
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*Element, type=S3
 1, 2824, 1171,  317
 2, 2060, 2008, 2026
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*Element, type=S4R
  90,  848,  857,  629, 1129
  91,  857,  852,  925,  629
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*Nset, nset=_PickedSet2, internal, generate
    1,  3221,     1
*Elset, elset=_PickedSet2, internal, generate
    1,  3174,     1
** Section: Section-1
*Shell Section, elset=_PickedSet2, material=Material-1
0.094, 21
*End Instance
**
*Nset, nset=_PickedSet5, internal, instance=Part-1-1
   1,   2,   3,   4,   5,   6
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*Elset, elset=_PickedSet5, internal, instance=Part-1-1
   99,  100,  128,  130,  143,  144
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*Elset, elset=__PickedSurf4_SPOS, internal, instance=Part-1-1, generate
    1,  3174,     1
*Surface, type=ELEMENT, name=_PickedSurf4, internal
__PickedSurf4_SPOS, SPOS
*End Assembly
**
** MATERIALS
**
*Material, name=Material-1
*Density
1400.,
*Hyperelastic, mooney-rivlin
26000., 14000., 0.0005
** ----------------------------------------------------------------
**
** STEP: Step-1
**
*Step, name=Step-1, nlgeom=YES, inc=1000
*Static
1., 1., 1e-05, 1.
**
** BOUNDARY CONDITIONS
**
** Name: BC-1 Type: Displacement/Rotation
*Boundary
_PickedSet5, 1, 1
_PickedSet5, 2, 2
_PickedSet5, 3, 3
**
** LOADS
**
** Name: Load-1   Type: Pressure
*Dsload
_PickedSurf4, P, 8031.
**
** OUTPUT REQUESTS
**
*Restart, write, frequency=0
**
** FIELD OUTPUT: F-Output-1
**
*Output, field, variable=PRESELECT
**
** HISTORY OUTPUT: H-Output-1
**
*Output, history, variable=PRESELECT
*End Step
